<?xml version="1.0"?>
<!--
  File:     BMW801D.xml
  Author:   Aero-Matic v 0.82

  Inputs:
    name:           BMW801D
    type:           piston
    power:          1800 hp
    augmented?      no
    injected?       yes
-->

<piston_engine name="BMW801D">
  <minmp unit="INHG">         10.0 </minmp>
  <maxmp unit="INHG">         38.5 </maxmp>
  <displacement unit="IN3"> 2556.895 </displacement>
  <maxhp>        1800.00 </maxhp>
  <cycles>         4.0 </cycles>
  <idlerpm>      400.0 </idlerpm>
  <maxrpm>      2700.0 </maxrpm>
  <maxthrottle>    1.0 </maxthrottle><!-- Deprecated -->
  <minthrottle>    0.1 </minthrottle><!-- Deprecated -->
  <sparkfaildrop>  0.1 </sparkfaildrop>
  <volumetric-efficiency> 2.85 </volumetric-efficiency>
<!-- Optional items that affect engine performance -->
 <!-- Defining <bsfc> over-rides the built-in horsepower calculations -->
	<bsfc>           0.25 </bsfc>
	<stroke unit="IN">  6.15  </stroke>
	<bore unit="IN">    6.15 </bore>
	<cylinders>         14.0  </cylinders>
	<compression-ratio> 12.0 </compression-ratio>
	<numboostspeed>3</numboostspeed>
	<boostmanual>1</boostmanual>
	<boostoverride>1</boostoverride>

	<ratedboost1 unit="INHG"> 48.1 </ratedboost1>
	<ratedpower1 unit="HP"> 1800 </ratedpower1>
	<ratedrpm1> 1800 </ratedrpm1>
	<ratedaltitude1 unit="FT"> 12000 </ratedaltitude1>

	<ratedboost2 unit="INHG"> 58.1 </ratedboost2>
	<ratedpower2 unit="HP"> 1600 </ratedpower2>
	<ratedrpm2> 1600 </ratedrpm2>
	<ratedaltitude2 unit="FT"> 20000 </ratedaltitude2>

	<ratedboost3 unit="INHG"> 68.1 </ratedboost3>
	<ratedpower3 unit="HP"> 1900 </ratedpower3>
	<ratedrpm3> 2400 </ratedrpm3>
	<ratedaltitude3 unit="FT"> 24000 </ratedaltitude3>
</piston_engine>
