<?xml version="1.0"?>
<?xml-stylesheet type="text/xsl" href="http://jsbsim.sourceforge.net/JSBSim.xsl"?>

<fdm_config name="unnamed" version="2.0" release="ALPHA"
   xmlns:xsi="http://www.w3.org/2001/XMLSchema-instance"
   xsi:noNamespaceSchemaLocation="http://jsbsim.sourceforge.net/JSBSim.xsd">

	<fileheader>
		<author> Aeromatic v 0.95 </author>
		<filecreationdate>2015-02-26</filecreationdate>
		<version>$Revision: 1.15 $</version>
		<description> Models a Ju-390. </description>
	</fileheader>

	<!--
		File:     Koenigsadler-Jsb.xml
		Inputs:
			name:          Koenigsadler
			type:          multi-engine prop transport
			max weight:    177502.5 lb
			wing span:     165.0343 ft
			length:        112.2102 ft
			wing area:     2734.300094 sq-ft
			gear type:     taildragger
			retractable?:  yes
			# engines:     6
			engine type:   piston
			engine layout: wings
			yaw damper?    no

		Outputs:
			wing loading:  64.92 lb/sq-ft
			payload:       45319.4 lbs
			CL-alpha:      4.9 per radian
			CL-0:          0.24
			CL-max:        1.4
			CD-0:          0.025
			K:             0.039

	-->

	<metrics>
		<wingarea  unit="FT2"> 2734.30 </wingarea>
		<wingspan  unit="FT" >  165.03 </wingspan>
		<wing_incidence>          1.50 </wing_incidence>
		<chord     unit="FT" >   16.57 </chord>
		<htailarea unit="FT2">  904.26 </htailarea>
		<htailarm  unit="FT" >   22.31 </htailarm>
		<vtailarea unit="FT2">  452.13 </vtailarea>
		<vtailarm  unit="FT" >   22.31 </vtailarm>
		<location name="AERORP" unit="IN">
			<x> 575.79 </x>
			<y>   0.00 </y>
			<z>   0.00 </z>
		</location>
		<location name="EYEPOINT" unit="IN">
			<x> 107.72 </x>
			<y> -24.00 </y>
			<z>  65.00 </z>
		</location>
		<location name="VRP" unit="IN">
			<x>0</x>
			<y>0</y>
			<z>0</z>
		</location>
	</metrics>

	<mass_balance>
		<ixx unit="SLUG*FT2">   1885985 </ixx>
		<iyy unit="SLUG*FT2">   1043015 </iyy>
		<izz unit="SLUG*FT2">   2870460 </izz>
		<emptywt unit="LBS" >     76098 </emptywt>
		<location name="CG" unit="IN">
			<x> 575.79 </x>
			<y>   0.00 </y>
			<z> -33.66 </z>
		</location>

		<pointmass name="Crew">
			<weight unit="LBS">1400</weight>
			<location name="POINTMASS" unit="IN">
				<x>20.00</x>
				<y>0.00</y>
				<z>-7.876</z>
			</location>
		</pointmass>

		<pointmass name="Bombload">
			<description> 45319 LBS + full (45086 LBS) fuel should bring model up to entered max weight</description>
			<weight unit="LBS">  22046.23 </weight>
			<location name="POINTMASS" unit="IN">
				<x> 600.79 </x>
				<y>   0.00 </y>
				<z> -33.66 </z>
			</location>
		</pointmass>
	</mass_balance>

	<ground_reactions>

		<contact type="BOGEY" name="INNER_LEFT_MAIN">
			<location unit="IN">
				<x> 480.94 </x>
				<y> -217.85 </y>
				<z> -66.00 </z>
			</location>
			<static_friction>  0.80 </static_friction>
			<dynamic_friction> 0.50 </dynamic_friction>
			<rolling_friction> 0.02 </rolling_friction>
			<spring_coeff unit="LBS/FT">      450100.00 </spring_coeff>
			<damping_coeff unit="LBS/FT/SEC"> 245500.00 </damping_coeff>
			<damping_coeff_rebound unit="LBS/FT/SEC">45000</damping_coeff_rebound>
			<max_steer unit="DEG">0</max_steer>
			<brake_group>LEFT</brake_group>
			<retractable>1</retractable>
		</contact>

		<contact type="BOGEY" name="INNER_RIGHT_MAIN">
			<location unit="IN">
				<x> 480.94 </x>
				<y> 217.85 </y>
				<z> -66.00 </z>
			</location>
			<static_friction>  0.80 </static_friction>
			<dynamic_friction> 0.50 </dynamic_friction>
			<rolling_friction> 0.02 </rolling_friction>
			<spring_coeff unit="LBS/FT">      450100.00 </spring_coeff>
			<damping_coeff unit="LBS/FT/SEC"> 245500.00 </damping_coeff>
			<damping_coeff_rebound unit="LBS/FT/SEC">45000</damping_coeff_rebound>
			<max_steer unit="DEG">0</max_steer>
			<brake_group>RIGHT</brake_group>
			<retractable>1</retractable>
		</contact>

		<contact type="BOGEY" name="OUTER_LEFT_MAIN">
			<location unit="IN">
				<x> 480.94 </x>
				<y> -337.85 </y>
				<z> -66.00 </z>
			</location>
			<static_friction>  0.80 </static_friction>
			<dynamic_friction> 0.50 </dynamic_friction>
			<rolling_friction> 0.02 </rolling_friction>
			<spring_coeff unit="LBS/FT">      450100.00 </spring_coeff>
			<damping_coeff unit="LBS/FT/SEC"> 245500.00 </damping_coeff>
			<damping_coeff_rebound unit="LBS/FT/SEC">45000</damping_coeff_rebound>
			<max_steer unit="DEG">0</max_steer>
			<brake_group>LEFT</brake_group>
			<retractable>1</retractable>
		</contact>

		<contact type="BOGEY" name="OUTER_RIGHT_MAIN">
			<location unit="IN">
				<x> 480.94 </x>
				<y> 337.85 </y>
				<z> -66.00 </z>
			</location>
			<static_friction>  0.80 </static_friction>
			<dynamic_friction> 0.50 </dynamic_friction>
			<rolling_friction> 0.02 </rolling_friction>
			<spring_coeff unit="LBS/FT">      450100.00 </spring_coeff>
			<damping_coeff unit="LBS/FT/SEC"> 245500.00 </damping_coeff>
			<damping_coeff_rebound unit="LBS/FT/SEC">45000</damping_coeff_rebound>
			<max_steer unit="DEG">0</max_steer>
			<brake_group>RIGHT</brake_group>
			<retractable>1</retractable>
		</contact>

		<contact type="BOGEY" name="TAIL">
			<location unit="IN">
				<x> 1320.08 </x>
				<y>   0.00 </y>
				<z> 52 </z>
			</location>
			<static_friction>  0.80 </static_friction>
			<dynamic_friction> 0.50 </dynamic_friction>
			<rolling_friction> 0.02 </rolling_friction>
			<spring_coeff unit="LBS/FT"> 62000 </spring_coeff>
			<damping_coeff unit="LBS/FT/SEC"> 40000 </damping_coeff>
			<damping_coeff_rebound unit="LBS/FT/SEC">25000</damping_coeff_rebound>
			<steerability> STEERABLE </steerability>
			<max_steer unit="DEG"> -45.00 </max_steer>
			<brake_group>NONE</brake_group>
			<retractable>0</retractable>
		</contact>

		<contact type="STRUCTURE" name="INNER_LEFT_MAIN_STOPPER">
			<location unit="IN">
				<x> 480.94 </x>
				<y> -217.85 </y>
				<z> -62.00 </z>
			</location>
			<static_friction>  1.00 </static_friction>
			<dynamic_friction> 1.00 </dynamic_friction>
			<spring_coeff unit="LBS/FT"> 999999.00 </spring_coeff>
			<damping_coeff unit="LBS/FT/SEC"> 999999.00 </damping_coeff>
			<damping_coeff_rebound unit="LBS/FT/SEC">65000</damping_coeff_rebound>
		</contact>

		<contact type="BOGEY" name="INNER_RIGHT_MAIN_STOPPER">
			<location unit="IN">
				<x> 480.94 </x>
				<y> 217.85 </y>
				<z> -62.00 </z>
			</location>
			<static_friction>  1.00 </static_friction>
			<dynamic_friction> 1.00 </dynamic_friction>
			<spring_coeff unit="LBS/FT"> 999999.00 </spring_coeff>
			<damping_coeff unit="LBS/FT/SEC"> 999999.00 </damping_coeff>
			<damping_coeff_rebound unit="LBS/FT/SEC">65000</damping_coeff_rebound>
		</contact>

		<contact type="BOGEY" name="OUTER_LEFT_MAIN_STOPPER">
			<location unit="IN">
				<x> 480.94 </x>
				<y> -337.85 </y>
				<z> -62.00 </z>
			</location>
			<static_friction>  1.00 </static_friction>
			<dynamic_friction> 1.00 </dynamic_friction>
			<spring_coeff unit="LBS/FT"> 999999.00 </spring_coeff>
			<damping_coeff unit="LBS/FT/SEC"> 999999.00 </damping_coeff>
			<damping_coeff_rebound unit="LBS/FT/SEC">65000</damping_coeff_rebound>
		</contact>

		<contact type="BOGEY" name="OUTER_RIGHT_MAIN_STOPPER">
			<location unit="IN">
				<x> 480.94 </x>
				<y> 337.85 </y>
				<z> -62.00 </z>
			</location>
			<static_friction>  1.00 </static_friction>
			<dynamic_friction> 1.00 </dynamic_friction>
			<spring_coeff unit="LBS/FT"> 999999.00 </spring_coeff>
			<damping_coeff unit="LBS/FT/SEC"> 999999.00 </damping_coeff>
			<damping_coeff_rebound unit="LBS/FT/SEC">65000</damping_coeff_rebound>
		</contact>

		<contact type="STRUCTURE" name="LEFT_WING">
			<location unit="IN">
				<x> 481.79 </x>
				<y> -82.52 </y>
				<z> -33.66 </z>
			</location>
			<static_friction>  1.00 </static_friction>
			<dynamic_friction> 1.00 </dynamic_friction>
			<spring_coeff unit="LBS/FT"> 999999.00 </spring_coeff>
			<damping_coeff unit="LBS/FT/SEC"> 999999.00 </damping_coeff>
		</contact>

		<contact type="STRUCTURE" name="RIGHT_WING">
			<location unit="IN">
				<x> 481.79 </x>
				<y>  82.52 </y>
				<z> -33.66 </z>
			</location>
			<static_friction>  1.00 </static_friction>
			<dynamic_friction> 1.00 </dynamic_friction>
			<spring_coeff unit="LBS/FT"> 999999.00 </spring_coeff>
			<damping_coeff unit="LBS/FT/SEC"> 999999.00 </damping_coeff>
		</contact>

		<contact type="STRUCTURE" name="NOSE_TIP">
			<location unit="IN">
				<x> 0.00 </x>
				<y> 0.00 </y>
				<z> 0.00 </z>
			</location>
			<static_friction>  1.00 </static_friction>
			<dynamic_friction> 1.00 </dynamic_friction>
			<spring_coeff unit="LBS/FT"> 999999.00 </spring_coeff>
			<damping_coeff unit="LBS/FT/SEC"> 999999.00 </damping_coeff>
		</contact>

	</ground_reactions>

	<propulsion>

		<engine file="BMW801D">
			<location unit="IN">
				<x> 482.79 </x>
				<y> -330.07 </y>
				<z> -40.00 </z>
			</location>
			<orient unit="DEG">
				<pitch> 0.00 </pitch>
				<roll>  0.00 </roll>
				<yaw>   0.00 </yaw>
			</orient>
			<feed>0</feed>
			<feed>6</feed>
			<feed>7</feed>
			<thruster file="Prop">
				<sense> 1 </sense>
				<location unit="IN">
					<x> 480.79 </x>
					<y> -330.07 </y>
					<z> -40.00 </z>
				</location>
				<orient unit="DEG">
					<pitch> 0.00 </pitch>
					<roll>  0.00 </roll>
					<yaw>   0.00 </yaw>
				</orient>
			</thruster>
		</engine>

		<engine file="BMW801D">
			<location unit="IN">
				<x> 482.79 </x>
				<y> -230.07 </y>
				<z> -40.00 </z>
			</location>
			<orient unit="DEG">
				<pitch> 0.00 </pitch>
				<roll>  0.00 </roll>
				<yaw>   0.00 </yaw>
			</orient>
			<feed>1</feed>
			<feed>6</feed>
			<feed>7</feed>
			<thruster file="Prop">
				<sense> 1 </sense>
				<location unit="IN">
					<x> 480.79 </x>
					<y> -230.07 </y>
					<z> -40.00 </z>
				</location>
				<orient unit="DEG">
					<pitch> 0.00 </pitch>
					<roll>  0.00 </roll>
					<yaw>   0.00 </yaw>
				</orient>
			</thruster>
		</engine>

		<engine file="BMW801D">
			<location unit="IN">
				<x> 482.79 </x>
				<y> -130.07 </y>
				<z> -40.00 </z>
			</location>
			<orient unit="DEG">
				<pitch> 0.00 </pitch>
				<roll>  0.00 </roll>
				<yaw>   0.00 </yaw>
			</orient>
			<feed>2</feed>
			<feed>6</feed>
			<feed>7</feed>
			<thruster file="Prop">
				<sense> 1 </sense>
				<location unit="IN">
					<x> 480.79 </x>
					<y> -130.07 </y>
					<z> -40.00 </z>
				</location>
				<orient unit="DEG">
					<pitch> 0.00 </pitch>
					<roll>  0.00 </roll>
					<yaw>   0.00 </yaw>
				</orient>
			</thruster>
		</engine>

		<engine file="BMW801D">
			<location unit="IN">
				<x> 482.79 </x>
				<y> 130.07 </y>
				<z> -40.00 </z>
			</location>
			<orient unit="DEG">
				<pitch> 0.00 </pitch>
				<roll>  0.00 </roll>
				<yaw>   0.00 </yaw>
			</orient>
			<feed>3</feed>
			<feed>6</feed>
			<feed>7</feed>
			<thruster file="Prop">
				<sense> 1 </sense>
				<location unit="IN">
					<x> 480.79 </x>
					<y> 130.07 </y>
					<z> -40.00 </z>
				</location>
				<orient unit="DEG">
					<pitch> 0.00 </pitch>
					<roll>  0.00 </roll>
					<yaw>   0.00 </yaw>
				</orient>
			</thruster>
		</engine>

		<engine file="BMW801D">
			<location unit="IN">
				<x> 482.79 </x>
				<y> 230.07 </y>
				<z> -40.00 </z>
			</location>
			<orient unit="DEG">
				<pitch> 0.00 </pitch>
				<roll>  0.00 </roll>
				<yaw>   0.00 </yaw>
			</orient>
			<feed>4</feed>
			<feed>6</feed>
			<feed>7</feed>
			<thruster file="Prop">
				<sense> 1 </sense>
				<location unit="IN">
					<x> 480.79 </x>
					<y> 230.07 </y>
					<z> -40.00 </z>
				</location>
				<orient unit="DEG">
					<pitch> 0.00 </pitch>
					<roll>  0.00 </roll>
					<yaw>   0.00 </yaw>
				</orient>
			</thruster>
		</engine>

		<engine file="BMW801D">
			<location unit="IN">
				<x> 472.79 </x>
				<y> 330.07 </y>
				<z> -40.00 </z>
			</location>
			<orient unit="DEG">
				<pitch> 0.00 </pitch>
				<roll>  0.00 </roll>
				<yaw>   0.00 </yaw>
			</orient>
			<feed>5</feed>
			<feed>6</feed>
			<feed>7</feed>
			<thruster file="Prop">
				<sense> 1 </sense>
				<location unit="IN">
					<x> 480.79 </x>
					<y> 330.07 </y>
					<z> -40.00 </z>
				</location>
				<orient unit="DEG">
					<pitch> 0.00 </pitch>
					<roll>  0.00 </roll>
					<yaw>   0.00 </yaw>
				</orient>
			</thruster>
		</engine>

		<tank type="FUEL" number="0">
			<location unit="IN">
				<x> 485.79 </x>
				<y> -100.00 </y>
				<z> -33.66 </z>
			</location>
			<priority>2</priority>
			<capacity unit="LBS"> 8200.00 </capacity>
			<contents unit="LBS"> 8200.00 </contents>
			<type> AVGAS </type>
		</tank>

		<tank type="FUEL" number="1">
			<location unit="IN">
				<x> 485.79 </x>
				<y> 100.00 </y>
				<z> -33.66 </z>
			</location>
			<priority>2</priority>
			<capacity unit="LBS"> 8200.00 </capacity>
			<contents unit="LBS"> 8200.00 </contents>
			<type> AVGAS </type>
		</tank>

		<tank type="FUEL" number="2">
			<location unit="IN">
				<x> 485.79 </x>
				<y> -200.00 </y>
				<z> -33.66 </z>
			</location>
			<priority>2</priority>
			<capacity unit="LBS"> 8200.00 </capacity>
			<contents unit="LBS"> 8200.00 </contents>
			<type> AVGAS </type>
		</tank>

		<tank type="FUEL" number="3">
			<location unit="IN">
				<x> 485.79 </x>
				<y> 200.00 </y>
				<z> -33.66 </z>
			</location>
			<priority>2</priority>
			<capacity unit="LBS"> 8200.00 </capacity>
			<contents unit="LBS"> 8200.00 </contents>
			<type> AVGAS </type>
		</tank>

		<tank type="FUEL" number="4">
			<location unit="IN">
				<x> 485.79 </x>
				<y> -300.00 </y>
				<z> -33.66 </z>
			</location>
			<priority>2</priority>
			<capacity unit="LBS"> 8200.00 </capacity>
			<contents unit="LBS"> 8200.00 </contents>
			<type> AVGAS </type>
		</tank>

		<tank type="FUEL" number="5">
			<location unit="IN">
				<x> 485.79 </x>
				<y> 300.00 </y>
				<z> -33.66 </z>
			</location>
			<priority>2</priority>
			<capacity unit="LBS"> 8200.00 </capacity>
			<contents unit="LBS"> 8200.00 </contents>
			<type> AVGAS </type>
		</tank>

		<tank type="FUEL" number="6">
			<location unit="IN">
				<x> 485.79 </x>
				<y>   0.00 </y>
				<z> -33.66 </z>
			</location>
			<priority>1</priority>
			<capacity unit="LBS"> 15400.00 </capacity>
			<contents unit="LBS"> 15400.00 </contents>
			<type> AVGAS </type>
		</tank>

		<tank type="FUEL" number="7">
			<location unit="IN">
				<x> 585.79 </x>
				<y>   0.00 </y>
				<z> -33.66 </z>
			</location>
			<priority>1</priority>
			<capacity unit="LBS"> 15400.00 </capacity>
			<contents unit="LBS"> 15400.00 </contents>
			<type> AVGAS </type>
		</tank>

	</propulsion>

	<flight_control name="FCS: unnamed">

		<channel name="Pitch">

			<summer name="Pitch Trim Sum">
				<input>fcs/elevator-cmd-norm</input>
				<input>fcs/pitch-trim-cmd-norm</input>
				<clipto>
					<min> -1 </min>
					<max>  1 </max>
				</clipto>
			</summer>

			<aerosurface_scale name="Elevator Control">
				<input>fcs/pitch-trim-sum</input>
				<range>
					<min> -0.35 </min>
					<max>  0.35 </max>
				</range>
				<output>fcs/elevator-pos-rad</output>
			</aerosurface_scale>

			<aerosurface_scale name="elevator normalization">
				<input>fcs/elevator-pos-rad</input>
				<domain>
					<min> -0.35 </min>
					<max>  0.35 </max>
				</domain>
				<range>
					<min> -1 </min>
					<max>  1 </max>
				</range>
				<output>fcs/elevator-pos-norm</output>
			</aerosurface_scale>

		</channel>

		<channel name="Roll">

			<summer name="Roll Trim Sum">
				<input>fcs/aileron-cmd-norm</input>
				<input>fcs/roll-trim-cmd-norm</input>
				<clipto>
					<min> -1 </min>
					<max>  1 </max>
				</clipto>
			</summer>

			<aerosurface_scale name="Left Aileron Control">
				<input>fcs/roll-trim-sum</input>
				<range>
					<min> -0.35 </min>
					<max>  0.35 </max>
				</range>
				<output>fcs/left-aileron-pos-rad</output>
			</aerosurface_scale>

			<aerosurface_scale name="Right Aileron Control">
				<input>fcs/roll-trim-sum</input>
				<range>
					<min> -0.35 </min>
					<max>  0.35 </max>
				</range>
				<output>fcs/right-aileron-pos-rad</output>
			</aerosurface_scale>

			<aerosurface_scale name="left aileron normalization">
				<input>fcs/left-aileron-pos-rad</input>
				<domain>
					<min> -0.35 </min>
					<max>  0.35 </max>
				</domain>
				<range>
					<min> -1 </min>
					<max>  1 </max>
				</range>
				<output>fcs/left-aileron-pos-norm</output>
			</aerosurface_scale>

			<aerosurface_scale name="right aileron normalization">
				<input>fcs/right-aileron-pos-rad</input>
				<domain>
					<min> -0.35 </min>
					<max>  0.35 </max>
				</domain>
				<range>
					<min> -1 </min>
					<max>  1 </max>
				</range>
				<output>fcs/right-aileron-pos-norm</output>
			</aerosurface_scale>

		</channel>

		<channel name="Yaw">

			<summer name="Rudder Command Sum">
				<input>fcs/rudder-cmd-norm</input>
				<input>fcs/yaw-trim-cmd-norm</input>
				<clipto>
					<min> -1 </min>
					<max>  1 </max>
				</clipto>
			</summer>

			<aerosurface_scale name="Rudder Control">
				<input>fcs/rudder-command-sum</input>
				<range>
					<min> -0.35 </min>
					<max>  0.35 </max>
				</range>
				<output>fcs/rudder-pos-rad</output>
			</aerosurface_scale>

			<aerosurface_scale name="rudder normalization">
				<input>fcs/rudder-pos-rad</input>
				<domain>
					<min> -0.35 </min>
					<max>  0.35 </max>
				</domain>
				<range>
					<min> -1 </min>
					<max>  1 </max>
				</range>
				<output>fcs/rudder-pos-norm</output>
			</aerosurface_scale>

		</channel>

		<channel name="Flaps">

			<kinematic name="Flaps Control">
				<input>fcs/flap-cmd-norm</input>
				<traverse>
					<setting>
						<position>  0 </position>
						<time>      0 </time>
					</setting>
					<setting>
						<position> 10 </position>
						<time>      3 </time>
					</setting>
					<setting>
						<position> 15 </position>
          					<time>      3 </time>
					</setting>
					<setting>
						<position> 30 </position>
						<time>      3 </time>
       					</setting>
					<setting>
						<position> 45 </position>
          					<time>      3 </time>
					</setting>
				</traverse>
				<output>fcs/flap-pos-deg</output>
			</kinematic>

			<aerosurface_scale name="flap normalization">
				<input>fcs/flap-pos-deg</input>
				<domain>
					<min>  0 </min>
					<max> 45 </max>
				</domain>
				<range>
					<min> 0 </min>
					<max> 1 </max>
				</range>
				<output>fcs/flap-pos-norm</output>
			</aerosurface_scale>

		</channel>

		<channel name="Landing Gear">

			<kinematic name="Gear Control">
				<input>gear/gear-cmd-norm</input>
				<traverse>
					<setting>
						<position> 0 </position>
						<time>     0 </time>
					</setting>
				<setting>
				<position> 1 </position>
					<time>     5 </time>
					</setting>
				</traverse>
				<output>gear/gear-pos-norm</output>
			</kinematic>

		</channel>

		<channel name="Speedbrake">

			<kinematic name="Speedbrake Control">
				<input>fcs/speedbrake-cmd-norm</input>
				<traverse>
					<setting>
						<position> 0 </position>
						<time>     0 </time>
					</setting>
					<setting>
						<position> 1 </position>
						<time>     1 </time>
					</setting>
				</traverse>
				<output>fcs/speedbrake-pos-norm</output>
			</kinematic>

		</channel>

 </flight_control>

 <aerodynamics>

	<axis name="LIFT">

		<!-- Lift due to ground effects to make the take off faster -->
		<function name="aero/function/kCLge">
			<description>Change_in_lift_due_to_ground_effect</description>
			<product>
				<table>
					<independentVar>aero/h_b-mac-ft</independentVar>
					<tableData>
						0.0000	1.2000
						0.1000	1.3200
						0.1500	1.3600
						0.2000	1.4000
						1.1000	1.2000
						1.5000  1.1000
						1.8000  1.0000
					</tableData>
				</table>
			</product>
		</function>

		<function name="aero/coefficient/CLalpha">
			<description>Lift_due_to_alpha</description>
			<product>
				<property>aero/qbar-psf</property>
				<property>metrics/Sw-sqft</property>
				<property>aero/function/kCLge</property>
				<table>
					<independentVar lookup="row">aero/alpha-rad</independentVar>
					<tableData>
						-0.20 -0.550
						 0.00  0.400
						 0.23  1.100
						 0.60  0.400
					</tableData>
				</table>
			</product>
		</function>

		<function name="aero/force/Lift_flap">
			<description>Delta Lift due to flaps</description>
			<product>
				<property>aero/qbar-psf</property>
				<property>metrics/Sw-sqft</property>
				<property>fcs/flap-pos-deg</property>
				<value> 0.03000 </value>
			</product>
		</function>

		<function name="aero/force/Lift_speedbrake">
			<description>Delta Lift due to speedbrake</description>
			<product>
				<property>aero/qbar-psf</property>
				<property>metrics/Sw-sqft</property>
				<property>fcs/speedbrake-pos-norm</property>
				<value>0</value>
			</product>
		</function>

		<function name="aero/force/Lift_elevator">
			<description>Lift due to Elevator Deflection</description>
			<product>
				<property>aero/qbar-psf</property>
				<property>metrics/Sw-sqft</property>
				<property>fcs/elevator-pos-rad</property>
				<value>0.15</value>
			</product>
		</function>

	</axis>

  <axis name="DRAG">

    <function name="aero/force/Drag_basic">
       <description>Drag at zero lift</description>
       <product>
          <property>aero/qbar-psf</property>
          <property>metrics/Sw-sqft</property>
          <table>
            <independentVar lookup="row">aero/alpha-rad</independentVar>
            <tableData>
             -1.57    1.500
             -0.26    0.033
              0.00    0.025
              0.26    0.033
              1.57    1.500
            </tableData>
          </table>
       </product>
    </function>

    <function name="aero/force/Drag_induced">
       <description>Induced drag</description>
         <product>
           <property>aero/qbar-psf</property>
           <property>metrics/Sw-sqft</property>
           <property>aero/cl-squared</property>
           <value>0.039</value>
         </product>
    </function>

    <function name="aero/force/Drag_mach">
       <description>Drag due to mach</description>
        <product>
          <property>aero/qbar-psf</property>
          <property>metrics/Sw-sqft</property>
          <table>
            <independentVar lookup="row">velocities/mach</independentVar>
            <tableData>
                0.00      0.000
                0.70      0.000
                1.10      0.023
                1.80      0.015
            </tableData>
          </table>
        </product>
    </function>

    <function name="aero/force/Drag_flap">
       <description>Drag due to flaps</description>
         <product>
           <property>aero/qbar-psf</property>
           <property>metrics/Sw-sqft</property>
           <property>fcs/flap-pos-deg</property>
           <value> 0.00157 </value>
         </product>
    </function>

    <function name="aero/force/Drag_gear">
       <description>Drag due to gear</description>
         <product>
           <property>aero/qbar-psf</property>
           <property>metrics/Sw-sqft</property>
           <property>gear/gear-pos-norm</property>
           <value>0.033</value>
         </product>
    </function>

    <function name="aero/force/Drag_speedbrake">
       <description>Drag due to speedbrakes</description>
         <product>
           <property>aero/qbar-psf</property>
           <property>metrics/Sw-sqft</property>
           <property>fcs/speedbrake-pos-norm</property>
           <value>0.025</value>
         </product>
    </function>

    <function name="aero/force/Drag_beta">
       <description>Drag due to sideslip</description>
       <product>
          <property>aero/qbar-psf</property>
          <property>metrics/Sw-sqft</property>
          <table>
            <independentVar lookup="row">aero/beta-rad</independentVar>
            <tableData>
              -1.57    1.230
              -0.26    0.050
               0.00    0.000
               0.26    0.050
               1.57    1.230
            </tableData>
          </table>
       </product>
    </function>

    <function name="aero/force/Drag_elevator">
       <description>Drag due to Elevator Deflection</description>
       <product>
           <property>aero/qbar-psf</property>
           <property>metrics/Sw-sqft</property>
           <abs><property>fcs/elevator-pos-norm</property></abs>
           <value>0.04</value>
       </product>
    </function>

  </axis>

  <axis name="SIDE">

    <function name="aero/force/Side_beta">
       <description>Side force due to beta</description>
       <product>
           <property>aero/qbar-psf</property>
           <property>metrics/Sw-sqft</property>
           <property>aero/beta-rad</property>
           <value>-1</value>
       </product>
    </function>

  </axis>

  <axis name="ROLL">

    <function name="aero/moment/Roll_beta">
       <description>Roll moment due to beta</description>
       <product>
           <property>aero/qbar-psf</property>
           <property>metrics/Sw-sqft</property>
           <property>metrics/bw-ft</property>
           <property>aero/beta-rad</property>
           <value>-0.1</value>
       </product>
    </function>

    <function name="aero/moment/Roll_damp">
       <description>Roll moment due to roll rate</description>
       <product>
           <property>aero/qbar-psf</property>
           <property>metrics/Sw-sqft</property>
           <property>metrics/bw-ft</property>
           <property>aero/bi2vel</property>
           <property>velocities/p-aero-rad_sec</property>
           <value>-0.4</value>
       </product>
    </function>

    <function name="aero/moment/Roll_yaw">
       <description>Roll moment due to yaw rate</description>
       <product>
           <property>aero/qbar-psf</property>
           <property>metrics/Sw-sqft</property>
           <property>metrics/bw-ft</property>
           <property>aero/bi2vel</property>
           <property>velocities/r-aero-rad_sec</property>
           <value>0.15</value>
       </product>
    </function>

    <function name="aero/moment/Roll_aileron">
       <description>Roll moment due to aileron</description>
       <product>
          <property>aero/qbar-psf</property>
          <property>metrics/Sw-sqft</property>
          <property>metrics/bw-ft</property>
          <property>fcs/left-aileron-pos-rad</property>
          <value>0.15</value>
       </product>
    </function>

    <function name="aero/moment/Roll_rudder">
       <description>Roll moment due to rudder</description>
       <product>
           <property>aero/qbar-psf</property>
           <property>metrics/Sw-sqft</property>
           <property>metrics/bw-ft</property>
           <property>fcs/rudder-pos-rad</property>
           <value>0.01</value>
       </product>
    </function>

  </axis>

		<axis name="PITCH">

			<function name="aero/moment/Pitch_alpha">
				<description>Pitch moment due to alpha</description>
				<product>
					<property>aero/qbar-psf</property>
					<property>metrics/Sw-sqft</property>
					<property>metrics/cbarw-ft</property>
					<property>aero/alpha-rad</property>
					<value>-0.4</value>
				</product>
			</function>

			<function name="aero/moment/Pitch_elevator">
				<description>Pitch moment due to elevator</description>
				<product>
					<property>aero/qbar-psf</property>
					<property>metrics/Sw-sqft</property>
					<property>metrics/cbarw-ft</property>
					<property>fcs/elevator-pos-rad</property>
					<table>
						<independentVar lookup="row">velocities/mach</independentVar>
						<tableData>
							0.0     -1.000
							2.0     -0.250
						</tableData>
					</table>
				</product>
			</function>

			<function name="aero/moment/Pitch_damp">
				<description>Pitch moment due to pitch rate</description>
				<product>
					<property>aero/qbar-psf</property>
					<property>metrics/Sw-sqft</property>
					<property>metrics/cbarw-ft</property>
					<property>aero/ci2vel</property>
					<property>velocities/q-aero-rad_sec</property>
					<value>-22</value>
				</product>
			</function>

			<function name="aero/moment/Pitch_alphadot">
				<description>Pitch moment due to alpha rate</description>
				<product>
					<property>aero/qbar-psf</property>
					<property>metrics/Sw-sqft</property>
					<property>metrics/cbarw-ft</property>
					<property>aero/ci2vel</property>
					<property>aero/alphadot-rad_sec</property>
					<value>-8</value>
				</product>
			</function>

		</axis>

		<axis name="YAW">

			<function name="aero/moment/Yaw_beta">
				<description>Yaw moment due to beta</description>
				<product>
					<property>aero/qbar-psf</property>
					<property>metrics/Sw-sqft</property>
					<property>metrics/bw-ft</property>
					<property>aero/beta-rad</property>
					<value>0.12</value>
				</product>
			</function>

			<function name="aero/moment/Yaw_damp">
				<description>Yaw moment due to yaw rate</description>
				<product>
					<property>aero/qbar-psf</property>
					<property>metrics/Sw-sqft</property>
					<property>metrics/bw-ft</property>
					<property>aero/bi2vel</property>
					<property>velocities/r-aero-rad_sec</property>
					<value>-0.15</value>
				</product>
			</function>

			<function name="aero/moment/Yaw_rudder">
				<description>Yaw moment due to rudder</description>
				<product>
					<property>aero/qbar-psf</property>
					<property>metrics/Sw-sqft</property>
					<property>metrics/bw-ft</property>
					<property>fcs/rudder-pos-rad</property>
					<value>-0.1</value>
				</product>
			</function>

			<function name="aero/moment/Yaw_aileron">
				<description>Adverse yaw</description>
				<product>
					<property>aero/qbar-psf</property>
					<property>metrics/Sw-sqft</property>
					<property>metrics/bw-ft</property>
					<property>fcs/left-aileron-pos-rad</property>
					<value>-0.008</value>
				</product>
			</function>

		</axis>

	</aerodynamics>

	<external_reactions>
	</external_reactions>

</fdm_config>
